// SBML level 2 version 5

model Teusink2000_Glycolysis()

  // Compartments:
  compartment extracellular = 1;
  compartment cytosol in extracellular = 1;
  compartment mitochondrion = 1; mitochondrion is "Mitochondrial Matrix";

  // Species:
  species $H in cytosol = 1; H is "Proton (cytosolic)";
  species GLCi in cytosol = 0.087; GLCi is "Glucose in Cytosol";
  species G6P in cytosol = 2.45; G6P is "Glucose 6 Phosphate";
  species F6P in cytosol = 0.62; F6P is "Fructose 6 Phosphate";
  species F16P in cytosol = 5.51; F16P is "Fructose-1,6 bisphosphate";
  species TRIO in cytosol = 0.96; TRIO is "Triose-phosphate";
  species BPG in cytosol = 0.1; BPG is "1,3-bisphosphoglycerate";
  species P3G in cytosol = 0.9; P3G is "3-phosphoglycerate";
  species P2G in cytosol = 0.12; P2G is "2-phosphoglycerate";
  species PEP in cytosol = 0.1; PEP is "Phosphoenolpyruvate";
  species PYR in cytosol = 1.85; PYR is "Pyruvate";
  species ACE in cytosol = 0.17; ACE is "Acetaldehyde";
  species P in cytosol = 5; P is "High energy phosphates";
  species NAD in cytosol = 1.2;
  species NADH in cytosol = 0.39;
  species Glyc in cytosol = 0.1; Glyc is "Glycogen";
  species Trh in cytosol = 0.1; Trh is "Trehalose";
  species $CO2 in cytosol = 1;
  species $SUCC in cytosol = 0.1; SUCC is "Succinate";
  species $GLCo in extracellular = 10; GLCo is "Extracellular Glucose";
  species $ETOH in cytosol = 5; ETOH is "Ethanol";
  species $GLY in cytosol = 0.15; GLY is "Glycerol";
  species ATP in cytosol = 3; ATP is "ATP concentration";
  species ADP in cytosol = 0.7; ADP is "ADP concentration";
  species AMP in cytosol = 0.5; AMP is "AMP concentration";
  species SUM_P in cytosol; SUM_P is "sum of AXP conc";
  species $F26BP in cytosol = 0.02; F26BP is "F2,6P";
  species $Insulin in extracellular = 1;
  species $H2O in cytosol = 1;
  species IMP in cytosol = 0.01; IMP is "Inosine Monophosphate";
  species NH4 in cytosol = 0.01; NH4 is "Ammonia";
  species G1P in cytosol = 0.01; G1P is "Glucose 1 Phosphate";
  species NAD_m in mitochondrion = 1.2; NAD_m is "Nicotinamide Adenine Dinucleotide (oxidized)";
  species NADH_m in mitochondrion = 0.39; NADH_m is "Nicotinamide Adenine Dinucleotide (reduced)";
  species ATP_m in mitochondrion = 1.5; ATP_m is "Adenosine Triphosphate (mitochondrial)";
  species ADP_m in mitochondrion = 2.1; ADP_m is "Adenosine Diphosphate (mitochondrial)";
  species PYR_m in mitochondrion = 0.1; PYR_m is "Pyruvate";
  species AcCoA_m in mitochondrion = 0.05; AcCoA_m is "Acetyl-CoA";
  species OAA_m in mitochondrion = 0.1; OAA_m is "Oxaloacetate";
  species Cit_m in mitochondrion = 0.5; Cit_m is "Citrate";
  species IsoCit_m in mitochondrion = 0.05; IsoCit_m is "Isocitrate";
  species aKG_m in mitochondrion = 0.1; aKG_m is "Alpha-Ketoglutarate";
  species SuccCoA_m in mitochondrion = 0.1; SuccCoA_m is "Succinyl-CoA";
  species Succ_m in mitochondrion = 0.1; Succ_m is "Succinate";
  species Fum_m in mitochondrion = 0.05; Fum_m is "Fumarate";
  species Mal_m in mitochondrion = 0.1; Mal_m is "Malate";
  species CoA_m in mitochondrion = 0.5; CoA_m is "Coenzyme A";
  species FAD_m in mitochondrion = 0.5; FAD_m is "Flavin Adenine Dinucleotide (oxidized)";
  species FADH2_m in mitochondrion = 0.05; FADH2_m is "Flavin Adenine Dinucleotide (reduced)";
  species $CO2_m in mitochondrion = 1; CO2_m is "Carbon Dioxide";
  species iP_m in mitochondrion = 5; iP_m is "Inorganic Phosphate";
  species $O2_m in mitochondrion = 1; O2_m is "Oxygen";
  species $H_m in mitochondrion = 1; H_m is "Proton";
  species $H2O_m in mitochondrion = 1; H2O_m is "Water";
  species ROS_m in mitochondrion = 0.001;
  species NADP in cytosol = 0.1; NADP is "Nicotinamide Adenine Dinucleotide Phosphate (oxidized)";
  species NADPH in cytosol = 0.1; NADPH is "Nicotinamide Adenine Dinucleotide Phosphate (reduced)";
  species P6GL in cytosol = 0.1; P6GL is "6-Phosphogluconolactone";

  // Parameters:
  AMPK_active has mM;
  gR = 5.12 dimensionless;
  KmPFKF6P = 0.1 mM;
  KmPFKATP = 0.71 mM;
  Lzero = 0.66 dimensionless;
  CiPFKATP = 10 dimensionless;
  KiPFKATP = 0.65 mM;
  CPFKAMP = 0.0845 dimensionless;
  KPFKAMP = 0.0995 mM;
  CPFKF16BP = 0.397 dimensionless;
  KPFKF16BP = 0.111 mM;
  CPFKATP = 3 dimensionless;
  KeqAK = 0.45 dimensionless; KeqAK is "AK eq constant";
  KeqTPI = 0.045 dimensionless; KeqTPI is "TPI eq constant";
  toggle_vAK = 1 dimensionless;
  toggle_vATP = 1 dimensionless;
  toggle_vGLK = 1 dimensionless;
  toggle_vPFK = 1 dimensionless;
  toggle_vGLYCO = 1 dimensionless;
  toggle_vGP = 1 dimensionless;
  toggle_vATPsink = 1 dimensionless;
  K_AMPK = 1 dimensionless;
  kATP_decay = 0.001 per_min;
  kETC = 30 per_min; kETC is "Electron Transport Chain Rate Constant (NADH)";
  Km_NADH_m = 0.1 mM; Km_NADH_m is "Michaelis Constant for NADH_m in ETC";
  Km_O2_m = 0.1 mM; Km_O2_m is "Michaelis Constant for O2_m in ETC";
  kETC_FADH2 = 30 per_min; kETC_FADH2 is "Electron Transport Chain Rate Constant (FADH2)";
  Km_FADH2_m = 0.1 mM; Km_FADH2_m is "Michaelis Constant for FADH2_m in ETC";
  Km_O2_FADH2 = 0.1 mM; Km_O2_FADH2 is "Michaelis Constant for O2_m with FADH2";
  toggle_ROS_m = 1 dimensionless; toggle_ROS_m is "Toggle for ROS production";
  toggle_vG6PDH = 1 dimensionless;

  // Assignment rules:
  SUM_P := ATP + ADP + AMP;
  AMPK_active := 1/(1 + ATP/(AMP*K_AMPK));

  // Reactions:
  vGLK: GLCi + ATP -> G6P + ADP; toggle_vGLK*cytosol*VmGLK*(1 - AMPK_active*0.5)*GLCi*ATP*(1/((KmGLKGLCi + GLCi)*(1 + G6P/Ki_G6P))); vGLK is "Hexokinase";
    VmGLK = 5 mM_per_min; KmGLKGLCi = 0.08 mM; KmGLKATP = 0.15 mM; Ki_G6P = 0.2 mM;
  vPGI: G6P -> F6P; cytosol*VmPGI_2/KmPGIG6P_2*(G6P - F6P/KeqPGI_2)/(1 + G6P/KmPGIG6P_2 + F6P/KmPGIF6P_2); vPGI is "Glucose-6-phosphate isomerase";
    VmPGI_2 = 339.677 mM_per_min; KmPGIG6P_2 = 1.4 mM; KeqPGI_2 = 0.314 dimensionless; KmPGIF6P_2 = 0.3 mM;
  vGLYCO: G6P + P => Glyc; toggle_vGLYCO*cytosol*kcat_GLYCO*(G6P/(Km_G6P_GLYCO + G6P))*(P/(Km_P_GLYCO + P))*(Insulin/(KGLYCO_Insulin + Insulin))*(KGLYCO_AMPK/(KGLYCO_AMPK + AMPK_active)); vGLYCO is "Glycogen Synthase";  // modifiers: Insulin
    kcat_GLYCO = 6 mM_per_min; Km_G6P_GLYCO = 0.1 mM; Km_P_GLYCO = 0.1 mM; KGLYCO_Insulin = 0.5 dimensionless; KGLYCO_AMPK = 0.5 dimensionless;
  vGP: Glyc + P => G1P; toggle_vGP*Vm_GP*(Glyc/(Km_Glyc + Glyc))*(P/(vGP_Km_P + P))*(AMPK_active/(KGP_AMPK + AMPK_active))*(KGP_Insulin/(KGP_Insulin + Insulin)); vGP is "Glycogen Phosphorylase";  // modifiers: Insulin
    Vm_GP = 10 mM_per_min; Km_Glyc = 1 mM; vGP_Km_P = 0.5 mM; KGP_AMPK = 0.5 dimensionless; KGP_Insulin = 0.5 dimensionless;
  vPGM_G1P: G1P -> G6P; VmPGM_G1P*(G1P - G6P/Keq_PGM_G1P)/(1 + G1P/Km_G1P_PGM + G6P/Km_G6P_PGM); vPGM_G1P is "Phosphoglucomutase";
    VmPGM_G1P = 100 mM_per_min; Km_G1P_PGM = 0.15 mM; Km_G6P_PGM = 0.15 mM; Keq_PGM_G1P = 0.4 dimensionless;
  vTreha: 2 G6P + P => Trh; cytosol*kcat_TREHA*(G6P/(Km_G6P_TREHA + G6P))*(P/(Km_P_TREHA + P)); vTreha is "Trehalose 6-phosphate synthase";
    kcat_TREHA = 2.4 mM_per_min; Km_G6P_TREHA = 0.1 mM; Km_P_TREHA = 0.1 mM;
  vPFK: F6P + ATP => F16P + ADP; toggle_vPFK*(cytosol*VmPFK*gR*(F6P/KmPFKF6P)*(ATP/(KmPFKATP + ATP))*(1 + F6P/KmPFKF6P + ATP/KmPFKATP + gR*(F6P/KmPFKF6P)*(ATP/KmPFKATP) + KmPFKF6P + KmPFKATP + gR + ATP + F6P)/1)*0.3*AMPK_active; vPFK is "Phosphofructokinase";  // modifiers: AMP, F26BP
    VmPFK = 182.903 mM_per_min;
  vAK: 2 ADP -> ATP + AMP; toggle_vAK*(kf_AK*ADP^2 - kr_AK*ATP*AMP); vAK is "Adenylate kinase";
    kf_AK = 10 per_min; kr_AK = 5 mM_per_min;
  vATPsink: ATP + $H2O => ADP + P + $H; toggle_vATPsink*cytosol*Vm_ATPsink*(ATP/(Km_ATPsink + ATP))*(1/(1 + AMPK_active)); vATPsink is "Generic ATP Consumption";
    Vm_ATPsink = 1 mM_per_min; Km_ATPsink = 0.1 mM;
  vALD: F16P -> 2 TRIO; cytosol*VmALD/KmALDF16P*(F16P - KeqTPI/(1 + KeqTPI)*TRIO*(1/(1 + KeqTPI))*TRIO/KeqALD)/(1 + F16P/KmALDF16P + KeqTPI/(1 + KeqTPI)*TRIO/KmALDGAP + 1/(1 + KeqTPI)*TRIO/KmALDDHAP + KeqTPI/(1 + KeqTPI)*TRIO*(1/(1 + KeqTPI))*TRIO/(KmALDGAP*KmALDDHAP) + F16P*(KeqTPI/(1 + KeqTPI))*TRIO/(KmALDGAPi*KmALDF16P)); vALD is "Aldolase";
    VmALD = 322.258 mM_per_min; KmALDF16P = 0.3 mM; KeqALD = 0.069 dimensionless; KmALDGAP = 2 mM; KmALDDHAP = 2.4 mM; KmALDGAPi = 10 mM;
  vGAPDH: TRIO + NAD -> BPG + NADH; cytosol*(VmGAPDHf*(KeqTPI/(1 + KeqTPI))*TRIO*NAD/(KmGAPDHGAP*KmGAPDHNAD) - VmGAPDHr*BPG*NADH/(KmGAPDHBPG*KmGAPDHNADH))/((1 + KeqTPI/(1 + KeqTPI)*TRIO/KmGAPDHGAP + BPG/KmGAPDHBPG)*(1 + NAD/KmGAPDHNAD + NADH/KmGAPDHNADH)); vGAPDH is "Glyceraldehyde 3-phosphate dehydrogenase";
    VmGAPDHf = 1184.52 mM_per_min; KmGAPDHGAP = 0.21 mM; KmGAPDHNAD = 0.09 mM; VmGAPDHr = 6549.8 mM_per_min; KmGAPDHBPG = 0.0098 mM; KmGAPDHNADH = 0.06 mM;
  vPGK: BPG -> P3G + P; cytosol*VmPGK/(KmPGKP3G*KmPGKATP)*(KeqPGK*BPG*ADP - P3G*ATP)/((1 + BPG/KmPGKBPG + P3G/KmPGKP3G)*(1 + ATP/KmPGKATP + ADP/KmPGKADP)); vPGK is "Phosphoglycerate kinase";  // modifiers: ATP, ADP
    VmPGK = 1306.45 mM_per_min; KmPGKP3G = 0.53 mM; KmPGKATP = 0.3 mM; KeqPGK = 3200 dimensionless; KmPGKBPG = 0.003 mM; KmPGKADP = 0.2 mM;
  vPGM: P3G -> P2G; cytosol*VmPGM/KmPGMP3G*(P3G - P2G/KeqPGM)/(1 + P3G/KmPGMP3G + P2G/KmPGMP2G); vPGM is "Phosphoglycerate mutase";
    VmPGM = 2525.81 mM_per_min; KmPGMP3G = 1.2 mM; KeqPGM = 0.19 dimensionless; KmPGMP2G = 0.08 mM;
  vENO: P2G -> PEP; cytosol*VmENO/KmENOP2G*(P2G - PEP/KeqENO)/(1 + P2G/KmENOP2G + PEP/KmENOPEP); vENO is "Enolase";
    VmENO = 365.806 mM_per_min; KmENOP2G = 0.04 mM; KeqENO = 6.7 dimensionless; KmENOPEP = 0.5 mM;
  vPYK: PEP -> PYR + P; cytosol*VmPYK/(KmPYKPEP*KmPYKADP)*(PEP*ADP - PYR*ATP/KeqPYK)/((1 + PEP/KmPYKPEP + PYR/KmPYKPYR)*(1 + ATP/KmPYKATP + ADP/KmPYKADP)); vPYK is "Pyruvate kinase";  // modifiers: ATP, ADP
    VmPYK = 1088.71 mM_per_min; KmPYKPEP = 0.14 mM; KmPYKADP = 0.53 mM; KeqPYK = 6500 dimensionless; KmPYKPYR = 0.9 mM; KmPYKATP = 1.5 mM;
  vPDC: PYR => ACE + $CO2; cytosol*VmPDC*(PYR^nPDC/KmPDCPYR^nPDC)/(1 + PYR^nPDC/KmPDCPYR^nPDC); vPDC is "Pyruvate decarboxylase";
    VmPDC = 174.194 mM_per_min; nPDC = 1.9 dimensionless; KmPDCPYR = 4.33 mM;
  vSUC: 2 ACE + 3 NAD + 4 P => 3 NADH + $SUCC; cytosol*KSUCC*(ACE/(Km_ACE_SUCC + ACE))*(NAD/(Km_NAD_SUCC + NAD))*(P/(Km_P_SUCC + P)); vSUC is "Succinate synthesis";
    KSUCC = 21.4 mM_per_min; Km_ACE_SUCC = 0.1 mM; Km_NAD_SUCC = 0.1 mM; Km_P_SUCC = 0.1 mM;
  vGLT: $GLCo -> GLCi; VmGLT*(Insulin^nGLTInsulin/(Insulin^nGLTInsulin + KGLTInsulin^nGLTInsulin))*(VmGLT/KmGLTGLCo)*(GLCo - GLCi/KeqGLT)/(1 + GLCo/KmGLTGLCo + GLCi/KmGLTGLCi + 0.91*GLCo*GLCi/(KmGLTGLCo*KmGLTGLCi)); vGLT is "Glucose transport";  // modifiers: Insulin
    VmGLT = 97.264 mmoleper_min; KmGLTGLCo = 1.1918 mM; KeqGLT = 1 mM; KmGLTGLCi = 1.1918 mM; KGLTInsulin = 0.5 dimensionless; nGLTInsulin = 2 dimensionless;
  vADH: ACE + NADH -> NAD + $ETOH; -cytosol*(VmADH/(KiADHNAD*KmADHETOH)*(NAD*ETOH - NADH*ACE/KeqADH)/(1 + NAD/KiADHNAD + KmADHNAD*ETOH/(KiADHNAD*KmADHETOH) + KmADHNADH*ACE/(KiADHNADH*KmADHACE) + NADH/KiADHNADH + NAD*ETOH/(KiADHNAD*KmADHETOH) + KmADHNADH*NAD*ACE/(KiADHNAD*KiADHNADH*KmADHACE) + KmADHNAD*ETOH*NADH/(KiADHNAD*KmADHETOH*KiADHNADH) + NADH*ACE/(KiADHNADH*KmADHACE) + NAD*ETOH*ACE/(KiADHNAD*KmADHETOH*KiADHACE) + ETOH*NADH*ACE/(KiADHETOH*KiADHNADH*KmADHACE))); vADH is "Alcohol dehydrogenase";
    VmADH = 50 mM_per_min; KiADHNAD = 0.92 mM; KmADHETOH = 17 mM; KeqADH = 6.9e-5 dimensionless; KmADHNAD = 0.17 mM; KmADHNADH = 0.11 mM; KiADHNADH = 0.031 mM; KmADHACE = 1.11 mM; KiADHACE = 1.1 mM; KiADHETOH = 90 mM;
  vG3PDH: TRIO + NADH => NAD + $GLY; cytosol*VmG3PDH/(KmG3PDHDHAP*KmG3PDHNADH)*(1/(1 + KeqTPI)*TRIO*NADH - GLY*NAD/KeqG3PDH)/((1 + 1/(1 + KeqTPI)*TRIO/KmG3PDHDHAP + GLY/KmG3PDHGLY)*(1 + NADH/KmG3PDHNADH + NAD/KmG3PDHNAD)); vG3PDH is "Glycerol 3-phosphate dehydrogenase";
    VmG3PDH = 70.15 mM_per_min; KmG3PDHDHAP = 0.4 mM; KmG3PDHNADH = 0.023 mM; KeqG3PDH = 4300 dimensionless; KmG3PDHGLY = 1 mM; KmG3PDHNAD = 0.93 mM;
  vAMPD: AMP + $H2O => IMP + NH4; cytosol*Vm_AMPD_max*(AMP^n_AMPD/(Km_AMP^n_AMPD + AMP^n_AMPD))*(1/(1 + ATP/Ki_ATP_AMPD)); vAMPD is "AMP Deaminase";  // modifiers: ATP
    Vm_AMPD_max = 0.5 mM_per_min; Km_AMP = 0.1 mM; n_AMPD = 2 dimensionless; Ki_ATP_AMPD = 1 mM;
  vPYR_trans: PYR -> PYR_m; kPYR_trans*(PYR - PYR_m); vPYR_trans is "Pyruvate Transport";
    kPYR_trans = 10 per_min;
  vPDH: PYR_m + CoA_m + NAD_m => AcCoA_m + $CO2_m + NADH_m; VmPDH*PYR_m*CoA_m*NAD_m/((KmPDH_PYR + PYR_m)*(KmPDH_CoA + CoA_m)*(KmPDH_NAD + NAD_m)); vPDH is "Pyruvate Dehydrogenase";
    VmPDH = 100 mM_per_min; KmPDH_PYR = 0.1 mM; KmPDH_CoA = 0.01 mM; KmPDH_NAD = 0.1 mM;
  vCS: AcCoA_m + OAA_m => Cit_m + CoA_m; VmCS*(AcCoA_m/(KmCS_AcCoA + AcCoA_m))*(OAA_m/(KmCS_OAA + OAA_m)); vCS is "Citrate Synthase";
    VmCS = 50 mM_per_min; KmCS_AcCoA = 0.01 mM; KmCS_OAA = 0.05 mM;
  vAcon: Cit_m -> IsoCit_m; kAcon_f*(Cit_m - IsoCit_m/KeqAcon); vAcon is "Aconitase";
    kAcon_f = 100 per_min; KeqAcon = 1 dimensionless;
  vIDH: IsoCit_m + NAD_m => aKG_m + $CO2_m + NADH_m; VmIDH*IsoCit_m*NAD_m/((KmIDH_IsoCit + IsoCit_m)*(KmIDH_NAD + NAD_m)); vIDH is "Isocitrate Dehydrogenase";
    VmIDH = 50 mM_per_min; KmIDH_IsoCit = 0.1 mM; KmIDH_NAD = 0.1 mM;
  vAKGDH: aKG_m + CoA_m + NAD_m => SuccCoA_m + $CO2_m + NADH_m; VmAKGDH/(1 + K_slowdown_AKGDH/aKG_m)*aKG_m*CoA_m*NAD_m; vAKGDH is "Alpha-Ketoglutarate Dehydrogenase";
    VmAKGDH = 50 mM_per_min; KmAKGDH_aKG = 0.1 mM; KmAKGDH_CoA = 0.01 mM; KmAKGDH_NAD = 0.1 mM; K_slowdown_AKGDH = 0.01 mM;
  vSCS: SuccCoA_m + ADP_m + iP_m => Succ_m + ATP_m + CoA_m; VmSCS*SuccCoA_m*ADP_m*iP_m/((KmSCS_SuccCoA + SuccCoA_m)*(KmSCS_ADP + ADP_m)*(KmSCS_iP + iP_m)); vSCS is "Succinyl-CoA Synthetase";
    VmSCS = 50 mM_per_min; KmSCS_SuccCoA = 0.01 mM; KmSCS_ADP = 0.1 mM; KmSCS_iP = 1 mM;
  vSDH: Succ_m + FAD_m => Fum_m + FADH2_m; VmSDH*Succ_m*FAD_m/((KmSDH_Succ + Succ_m)*(KmSDH_FAD + FAD_m)); vSDH is "Succinate Dehydrogenase";
    VmSDH = 50 mM_per_min; KmSDH_Succ = 0.5 mM; KmSDH_FAD = 0.01 mM;
  vFUM: Fum_m -> Mal_m; kFUM_f*(Fum_m - Mal_m/KeqFUM); vFUM is "Fumarase";
    kFUM_f = 100 per_min; KeqFUM = 4 dimensionless;
  vMDH: Mal_m + NAD_m -> OAA_m + NADH_m; kMDH_f*Mal_m*NAD_m - kMDH_r*OAA_m*NADH_m; vMDH is "Malate Dehydrogenase";
    kMDH_f = 100 mM_per_min; kMDH_r = 10 mM_per_min;
  vPC: PYR_m + $CO2_m + ATP_m => OAA_m + ADP_m + iP_m; VmPC*(PYR_m/(KmPC_PYR + PYR_m))*(ATP_m/(KmPC_ATP + ATP_m))*(CO2_m/(KmPC_CO2 + CO2_m)); vPC is "Pyruvate Carboxylase";
    VmPC = 5 mM_per_min; KmPC_PYR = 0.05 mM; KmPC_ATP = 0.05 mM; KmPC_CO2 = 0.01 mM;
  vETC: NADH_m + 0.5 $O2_m + 5 $H_m => NAD_m + $H2O_m + 10 $H; kETC*(NADH_m/(Km_NADH_m + NADH_m))*(O2_m/(Km_O2_m + O2_m)); vETC is "Electron Transport Chain (NADH)";
  vETC_FADH2: FADH2_m + 0.5 $O2_m + 5 $H_m => FAD_m + $H2O_m + 10 $H; kETC_FADH2*(FADH2_m/(Km_FADH2_m + FADH2_m))*(O2_m/(Km_O2_FADH2 + O2_m)); vETC_FADH2 is "Electron Transport Chain (FADH2)";
  vATPsyn: ADP_m + iP_m + 3 $H_m => ATP_m + $H2O_m + 3 $H; Vmax_ATPsyn*(ADP_m/(vATPsyn_Km_ADP_m + ADP_m))*(iP_m/(Km_Pi_m + iP_m))*(H_m/(Km_H_m + H_m)); vATPsyn is "ATP Synthase";
    Vmax_ATPsyn = 12 mM_per_min; vATPsyn_Km_ADP_m = 0.03 mM; Km_Pi_m = 0.2 mM; Km_H_m = 0.1 mM;
  vPiH_symport: P + $H => iP_m + $H_m; Vmax_PiH*(P/(Km_PiH + P))*(H/(Km_H_PiH + H))*(Km_iP_m/(Km_iP_m + iP_m)); vPiH_symport is "Phosphate-H+ Symport";
    Vmax_PiH = 20 mM_per_min; Km_PiH = 0.5 mM; Km_H_PiH = 0.1 mM; Km_iP_m = 10 mM;
  vPi_import: iP_m => P; Vm_Pi_import*(iP_m/(Km_Pi_import + iP_m))*(vPi_import_Km_P/(vPi_import_Km_P + P)); vPi_import is "Cytosolic Pi Import";
    Vm_Pi_import = 1 mM_per_min; Km_Pi_import = 0.1 mM; vPi_import_Km_P = 1 mM;
  vANT: ATP_m + ADP -> ATP + ADP_m; Vmax_ANT*(ATP_m*ADP/(Km_ATP_m + ATP_m + Km_ADP + ADP) - ATP*ADP_m/(Km_ATP + ATP + vANT_Km_ADP_m + ADP_m)); vANT is "Adenine Nucleotide Translocator";
    Vmax_ANT = 5 mM_per_min; Km_ATP_m = 0.05 mM; Km_ADP = 0.05 mM; Km_ATP = 0.05 mM; vANT_Km_ADP_m = 0.05 mM;
  vROS: NADH_m + $O2_m => NAD_m + ROS_m; toggle_ROS_m*leakFactor*kETC*(NADH_m/(Km_NADH_m + NADH_m))*(O2_m/(Km_O2_m + O2_m)); vROS is "ROS Production";
    leakFactor = 0.01 dimensionless;
  vAntioxidants: ROS_m => ; ROS_clearance*ROS_m; vAntioxidants is "ROS Scavenging";
    ROS_clearance = 0.1 per_min;
  vG6PDH: G6P + NADP => P6GL + NADPH + $H; toggle_vG6PDH*VmG6PDH*(G6P/(KmG6PDH_G6P + G6P))*(NADP/(KmG6PDH_NADP + NADP)); vG6PDH is "Glucose-6-phosphate Dehydrogenase";
    VmG6PDH = 0.01 mM_per_min; KmG6PDH_G6P = 0.1 mM; KmG6PDH_NADP = 0.01 mM;

  // Unit definitions:
  unit substance = 1e-3 mole; substance is "millimole";
  unit time = 60 second; time is "minute";
  unit mM = 1e-3 mole / litre;
  unit mM_per_min = 1e-3 mole / (litre * 60 second);
  unit per_min = 1 / (60 second);
  unit mmoleper_min = 1e-3 mole / (60 second);
end
