// SBML level 2 version 4

function L_PFK(L, CiATP, KiATP, CAMP, KAMP, CF26BP, KF26BP, CF16BP, KF16BP, AT, AM, F16, F26)
  L*((1 + CiATP*(AT/KiATP))/(1 + AT/KiATP))^2*((1 + CAMP*(AM/KAMP))/(1 + AM/KAMP))^2*((1 + CF26BP*F26/KF26BP + CF16BP*F16/KF16BP)/(1 + F26/KF26BP + F16/KF16BP))^2;
end

function R_PFK(KmF6P, KmATP, g, AT, F6)
  1 + F6/KmF6P + AT/KmATP + g*(F6/KmF6P)*(AT/KmATP);
end

function T_PFK(CATP, KmATP, AT)
  1 + CATP*(AT/KmATP);
end

model Teusink2000_Glycolysis()

  // Compartments:
  compartment extracellular = 1;
  compartment cytosol in extracellular = 1;

  // Species:
  species GLCi in cytosol = 0.087; GLCi is "Glucose in Cytosol";
  species G6P in cytosol = 2.45; G6P is "Glucose 6 Phosphate";
  species F6P in cytosol = 0.62; F6P is "Fructose 6 Phosphate";
  species F16P in cytosol = 5.51; F16P is "Fructose-1,6 bisphosphate";
  species TRIO in cytosol = 0.96; TRIO is "Triose-phosphate";
  species BPG in cytosol = 0.1; BPG is "1,3-bisphosphoglycerate";
  species P3G in cytosol = 0.9; P3G is "3-phosphoglycerate";
  species P2G in cytosol = 0.12; P2G is "2-phosphoglycerate";
  species PEP in cytosol = 0.1; PEP is "Phosphoenolpyruvate";
  species PYR in cytosol = 1.85; PYR is "Pyruvate";
  species ACE in cytosol = 0.17; ACE is "Acetaldehyde";
  species P in cytosol = 5; P is "High energy phosphates";
  species NAD in cytosol = 1.2;
  species NADH in cytosol = 0.39;
  species AMPK_active in cytosol;
  species Glyc in cytosol = 0.1; Glyc is "Glycogen";
  species Trh in cytosol = 0.1; Trh is "Trehalose";
  species $CO2 in cytosol = 1;
  species $SUCC in cytosol = 0.1; SUCC is "Succinate";
  species $GLCo in extracellular = 10; GLCo is "Extracellular Glucose";
  species $ETOH in cytosol = 5; ETOH is "Ethanol";
  species $GLY in cytosol = 0.15; GLY is "Glycerol";
  species ATP in cytosol = 3; ATP is "ATP concentration";
  species ADP in cytosol = 0.7; ADP is "ADP concentration";
  species AMP in cytosol = 0.5; AMP is "AMP concentration";
  species SUM_P in cytosol; SUM_P is "sum of AXP conc";
  species $F26BP in cytosol = 0.02; F26BP is "F2,6P";
  species $Insulin in extracellular = 1;
  species $H2O in cytosol = 1;
  species IMP in cytosol = 0.01; IMP is "Inosine Monophosphate";
  species NH4 in cytosol = 0.01; NH4 is "Ammonia";
  species G1P in cytosol = 0.01; G1P is "Glucose 1 Phosphate";

  // Parameters:
  gR = 5.12 dimensionless;
  KmPFKF6P = 0.1 mM;
  KmPFKATP = 0.71 mM;
  Lzero = 0.66 dimensionless;
  CiPFKATP = 10 dimensionless;
  KiPFKATP = 0.65 mM;
  CPFKAMP = 0.0845 dimensionless;
  KPFKAMP = 0.0995 mM;
  CPFKF26BP = 0.0174 dimensionless;
  KPFKF26BP = 0.000682 mM;
  CPFKF16BP = 0.397 dimensionless;
  KPFKF16BP = 0.111 mM;
  CPFKATP = 3 dimensionless;
  KeqAK = 0.45 dimensionless; KeqAK is "AK eq constant";
  KeqTPI = 0.045 dimensionless; KeqTPI is "TPI eq constant";
  toggle_vAK = 1;
  toggle_vATP = 1;
  toggle_vGLK = 1;
  K_AMPK = 1 dimensionless;
  kATP_decay = 0.001 per_min;

  // Assignment rules:
  SUM_P := ATP + ADP + AMP;
  AMPK_active := 1/(1 + ATP/(AMP*K_AMPK));

  // Rate rules:
  ATP' = kATP_decay - ATP;

  // Reactions:
  vGLK: GLCi + ATP -> G6P + ADP; toggle_vGLK*cytosol*VmGLK*(1 - AMPK_active*0.5)*GLCi*ATP*(1/((KmGLKGLCi + GLCi)*(1 + G6P/Ki_G6P))); vGLK is "Hexokinase";
    VmGLK = 5 mMpermin; KmGLKGLCi = 0.08 mM; KmGLKATP = 0.15 mM; Ki_G6P = 0.2 mM;
  vPGI: G6P -> F6P; cytosol*VmPGI_2/KmPGIG6P_2*(G6P - F6P/KeqPGI_2)/(1 + G6P/KmPGIG6P_2 + F6P/KmPGIF6P_2); vPGI is "Glucose-6-phosphate isomerase";
    VmPGI_2 = 339.677 mMpermin; KmPGIG6P_2 = 1.4 mM; KeqPGI_2 = 0.314 dimensionless; KmPGIF6P_2 = 0.3 mM;
  vGLYCO: G6P + P => Glyc; cytosol*kcat_GLYCO*(G6P/(Km_G6P_GLYCO + G6P))*(P/(Km_P_GLYCO + P))*(Insulin/(KGLYCO_Insulin + Insulin))*(KGLYCO_AMPK/(KGLYCO_AMPK + AMPK_active)); vGLYCO is "Glycogen Synthase";
    kcat_GLYCO = 6 mMpermin; Km_G6P_GLYCO = 0.1 mM; Km_P_GLYCO = 0.1 mM; KGLYCO_Insulin = 0.5 dimensionless; KGLYCO_AMPK = 0.5 dimensionless;
  vGP: Glyc + P => G1P; Vm_GP*(Glyc/(Km_Glyc + Glyc))*(P/(Km_P + P))*(AMPK_active/(KGP_AMPK + AMPK_active))*(KGP_Insulin/(KGP_Insulin + Insulin)); vGP is "Glycogen Phosphorylase";
    Vm_GP = 10 mM_per_min; Km_Glyc = 1 mM; Km_P = 0.5 mM; KGP_AMPK = 0.5 dimensionless; KGP_Insulin = 0.5 dimensionless;
  vPGM_G1P: G1P -> G6P; VmPGM_G1P*(G1P - G6P/Keq_PGM_G1P)/(1 + G1P/Km_G1P_PGM + G6P/Km_G6P_PGM); vPGM_G1P is "Phosphoglucomutase";
    VmPGM_G1P = 100 mMpermin; Km_G1P_PGM = 0.15 mM; Km_G6P_PGM = 0.15 mM; Keq_PGM_G1P = 0.4 dimensionless;
  vTreha: 2 G6P + P => Trh; cytosol*kcat_TREHA*(G6P/(Km_G6P_TREHA + G6P))*(P/(Km_P_TREHA + P)); vTreha is "Trehalose 6-phosphate synthase";
    kcat_TREHA = 2.4 mMpermin; Km_G6P_TREHA = 0.1 mM; Km_P_TREHA = 0.1 mM;
  vPFK: F6P + ATP => F16P + ADP; cytosol*VmPFK*gR*(F6P/KmPFKF6P)*(ATP/(KmPFKATP + ATP))*R_PFK(KmPFKF6P, KmPFKATP, gR, ATP, F6P)/1*0.3*AMPK_active; vPFK is "Phosphofructokinase";  // modifiers: AMP, F26BP
    VmPFK = 182.903 mMpermin;
  vAK: 2 ADP -> ATP + AMP; toggle_vAK*(kf_AK*ADP^2 - kr_AK*ATP*AMP); vAK is "Adenylate kinase";
    kf_AK = 10 permin; kr_AK = 5 mMpermin;
  vATPsink: ATP + $H2O => ADP + P + H; cytosol*Vm_ATPsink*(ATP/(Km_ATPsink + ATP))*(1/(1 + AMPK_active)); vATPsink is "Generic ATP Consumption";
    Vm_ATPsink = 1 mM_per_min; Km_ATPsink = 0.1 mM;
  vALD: F16P -> 2 TRIO; cytosol*VmALD/KmALDF16P*(F16P - KeqTPI/(1 + KeqTPI)*TRIO*(1/(1 + KeqTPI))*TRIO/KeqALD)/(1 + F16P/KmALDF16P + KeqTPI/(1 + KeqTPI)*TRIO/KmALDGAP + 1/(1 + KeqTPI)*TRIO/KmALDDHAP + KeqTPI/(1 + KeqTPI)*TRIO*(1/(1 + KeqTPI))*TRIO/(KmALDGAP*KmALDDHAP) + F16P*(KeqTPI/(1 + KeqTPI))*TRIO/(KmALDGAPi*KmALDF16P)); vALD is "Aldolase";
    VmALD = 322.258 mMpermin; KmALDF16P = 0.3 mM; KeqALD = 0.069 dimensionless; KmALDGAP = 2 mM; KmALDDHAP = 2.4 mM; KmALDGAPi = 10 mM;
  vGAPDH: TRIO + NAD -> BPG + NADH; cytosol*(VmGAPDHf*(KeqTPI/(1 + KeqTPI))*TRIO*NAD/(KmGAPDHGAP*KmGAPDHNAD) - VmGAPDHr*BPG*NADH/(KmGAPDHBPG*KmGAPDHNADH))/((1 + KeqTPI/(1 + KeqTPI)*TRIO/KmGAPDHGAP + BPG/KmGAPDHBPG)*(1 + NAD/KmGAPDHNAD + NADH/KmGAPDHNADH)); vGAPDH is "Glyceraldehyde 3-phosphate dehydrogenase";
    VmGAPDHf = 1184.52 mMpermin; KmGAPDHGAP = 0.21 mM; KmGAPDHNAD = 0.09 mM; VmGAPDHr = 6549.8 mMpermin; KmGAPDHBPG = 0.0098 mM; KmGAPDHNADH = 0.06 mM;
  vPGK: BPG -> P3G + P; cytosol*VmPGK/(KmPGKP3G*KmPGKATP)*(KeqPGK*BPG*ADP - P3G*ATP)/((1 + BPG/KmPGKBPG + P3G/KmPGKP3G)*(1 + ATP/KmPGKATP + ADP/KmPGKADP)); vPGK is "Phosphoglycerate kinase";  // modifiers: ATP, ADP
    VmPGK = 1306.45 mMpermin; KmPGKP3G = 0.53 mM; KmPGKATP = 0.3 mM; KeqPGK = 3200 dimensionless; KmPGKBPG = 0.003 mM; KmPGKADP = 0.2 mM;
  vPGM: P3G -> P2G; cytosol*VmPGM/KmPGMP3G*(P3G - P2G/KeqPGM)/(1 + P3G/KmPGMP3G + P2G/KmPGMP2G); vPGM is "Phosphoglycerate mutase";
    VmPGM = 2525.81 mMpermin; KmPGMP3G = 1.2 mM; KeqPGM = 0.19 dimensionless; KmPGMP2G = 0.08 mM;
  vENO: P2G -> PEP; cytosol*VmENO/KmENOP2G*(P2G - PEP/KeqENO)/(1 + P2G/KmENOP2G + PEP/KmENOPEP); vENO is "Enolase";
    VmENO = 365.806 mMpermin; KmENOP2G = 0.04 mM; KeqENO = 6.7 dimensionless; KmENOPEP = 0.5 mM;
  vPYK: PEP -> PYR + P; cytosol*VmPYK/(KmPYKPEP*KmPYKADP)*(PEP*ADP - PYR*ATP/KeqPYK)/((1 + PEP/KmPYKPEP + PYR/KmPYKPYR)*(1 + ATP/KmPYKATP + ADP/KmPYKADP)); vPYK is "Pyruvate kinase";  // modifiers: ATP, ADP
    VmPYK = 1088.71 mMpermin; KmPYKPEP = 0.14 mM; KmPYKADP = 0.53 mM; KeqPYK = 6500 dimensionless; KmPYKPYR = 0.9 mM; KmPYKATP = 1.5 mM;
  vPDC: PYR => ACE + $CO2; cytosol*VmPDC*(PYR^nPDC/KmPDCPYR^nPDC)/(1 + PYR^nPDC/KmPDCPYR^nPDC); vPDC is "Pyruvate decarboxylase";
    VmPDC = 174.194 mMpermin; nPDC = 1.9 dimensionless; KmPDCPYR = 4.33 mM;
  vSUC: 2 ACE + 3 NAD + 4 P => 3 NADH + $SUCC; cytosol*KSUCC*(ACE/(Km_ACE_SUCC + ACE))*(NAD/(Km_NAD_SUCC + NAD))*(P/(Km_P_SUCC + P)); vSUC is "Succinate synthesis";
    KSUCC = 21.4; Km_ACE_SUCC = 0.1 mM; Km_NAD_SUCC = 0.1 mM; Km_P_SUCC = 0.1 mM;
  vGLT: $GLCo -> GLCi; VmGLT*(Insulin^nGLTInsulin/(Insulin^nGLTInsulin + KGLTInsulin^nGLTInsulin))*(VmGLT/KmGLTGLCo)*(GLCo - GLCi/KeqGLT)/(1 + GLCo/KmGLTGLCo + GLCi/KmGLTGLCi + 0.91*GLCo*GLCi/(KmGLTGLCo*KmGLTGLCi)); vGLT is "Glucose transport";  // modifiers: Insulin
    VmGLT = 97.264 mmolepermin; KmGLTGLCo = 1.1918 mM; KeqGLT = 1 mM; KmGLTGLCi = 1.1918 mM; KGLTInsulin = 0.5 dimensionless; nGLTInsulin = 2 dimensionless;
  vADH: ACE + NADH -> NAD + $ETOH; -cytosol*(VmADH/(KiADHNAD*KmADHETOH)*(NAD*ETOH - NADH*ACE/KeqADH)/(1 + NAD/KiADHNAD + KmADHNAD*ETOH/(KiADHNAD*KmADHETOH) + KmADHNADH*ACE/(KiADHNADH*KmADHACE) + NADH/KiADHNADH + NAD*ETOH/(KiADHNAD*KmADHETOH) + KmADHNADH*NAD*ACE/(KiADHNAD*KiADHNADH*KmADHACE) + KmADHNAD*ETOH*NADH/(KiADHNAD*KmADHETOH*KiADHNADH) + NADH*ACE/(KiADHNADH*KmADHACE) + NAD*ETOH*ACE/(KiADHNAD*KmADHETOH*KiADHACE) + ETOH*NADH*ACE/(KiADHETOH*KiADHNADH*KmADHACE))); vADH is "Alcohol dehydrogenase";
    VmADH = 50 mMpermin; KiADHNAD = 0.92 mM; KmADHETOH = 17 mM; KeqADH = 6.9e-5 dimensionless; KmADHNAD = 0.17 mM; KmADHNADH = 0.11 mM; KiADHNADH = 0.031 mM; KmADHACE = 1.11 mM; KiADHACE = 1.1 mM; KiADHETOH = 90 mM;
  vG3PDH: TRIO + NADH => NAD + $GLY; cytosol*VmG3PDH/(KmG3PDHDHAP*KmG3PDHNADH)*(1/(1 + KeqTPI)*TRIO*NADH - GLY*NAD/KeqG3PDH)/((1 + 1/(1 + KeqTPI)*TRIO/KmG3PDHDHAP + GLY/KmG3PDHGLY)*(1 + NADH/KmG3PDHNADH + NAD/KmG3PDHNAD)); vG3PDH is "Glycerol 3-phosphate dehydrogenase";
    VmG3PDH = 70.15 mMpermin; KmG3PDHDHAP = 0.4 mM; KmG3PDHNADH = 0.023 mM; KeqG3PDH = 4300 dimensionless; KmG3PDHGLY = 1 mM; KmG3PDHNAD = 0.93 mM;
  vAMPD: AMP + $H2O => IMP + NH4; cytosol*Vm_AMPD*(AMP^n_AMPD/(Km_AMP^n_AMPD + AMP^n_AMPD)); vAMPD is "AMP Deaminase";
    Vm_AMPD = 5 mM_per_min; Km_AMP = 1 mM; n_AMPD = 3 dimensionless;

  // Unit definitions:
  unit substance = 1e-3 mole; substance is "millimole";
  unit time = 60 second; time is "minute";
  unit mM = 1e-3 mole / litre;
  unit mMpermin = 1e-3 mole / (litre * 60 second);
  unit permin = 1 / (60 second);
  unit mmolepermin = 1e-3 mole / (60 second);
end
