// SBML level 2 version 4

model OxPhos()

  // Compartments:
  compartment cytosol = 1; cytosol is "Cytosol";
  compartment mitochondrion = 1; mitochondrion is "Mitochondrial Matrix";

  // Species:
  species NAD_m in mitochondrion = 1.2; NAD_m is "Nicotinamide Adenine Dinucleotide (oxidized)";
  species NADH_m in mitochondrion = 0.39; NADH_m is "Nicotinamide Adenine Dinucleotide (reduced)";
  species ATP_m in mitochondrion = 1.5; ATP_m is "Adenosine Triphosphate (mitochondrial)";
  species ADP_m in mitochondrion = 2.1; ADP_m is "Adenosine Diphosphate (mitochondrial)";
  species ATP in cytosol = 1.5; ATP is "Adenosine Triphosphate (cytosolic)";
  species ADP in cytosol = 2.1; ADP is "Adenosine Diphosphate (cytosolic)";
  species $O2_m in mitochondrion = 1; O2_m is "Oxygen";
  species $H_m in mitochondrion = 1; H_m is "Proton";
  species $H in cytosol = 1; H is "Proton (cytosolic)";
  species $H2O_m in mitochondrion = 1; H2O_m is "Water";
  species P in cytosol = 6.31; P is "High energy phosphates";
  species iP_m in mitochondrion = 2.44; iP_m is "Inorganic Phosphate";
  species ROS_m in mitochondrion = 0;

  // Parameters:
  kETC = 60 per_min; kETC is "Electron Transport Chain Rate Constant (NADH)";
  Km_NADH_m = 0.1 mM; Km_NADH_m is "Michaelis Constant for NADH_m in ETC";
  Km_O2_m = 0.1 mM; Km_O2_m is "Michaelis Constant for O2_m in ETC";
  kETC_FADH2 = 30 per_min; kETC_FADH2 is "Electron Transport Chain Rate Constant (FADH2)";
  Km_FADH2_m = 0.1 mM; Km_FADH2_m is "Michaelis Constant for FADH2_m in ETC";
  Km_O2_FADH2 = 0.1 mM; Km_O2_FADH2 is "Michaelis Constant for O2_m with FADH2";
  kATPsyn = 70 per_mM_per_min; kATPsyn is "ATP Synthase Rate Constant";
  Km_ADP_m = 0.1 mM; Km_ADP_m is "Michaelis Constant for ADP_m in ATP Synthase";
  Km_iP_m = 0.1 mM; Km_iP_m is "Michaelis Constant for iP_m in ATP Synthase";
  Km_H_m = 0.1 mM; Km_H_m is "Michaelis Constant for H_m in ATP Synthase";
  kANT = 70 per_s; kANT is "Adenine Nucleotide Translocator Rate Constant";

  // Reactions:
  vETC: NADH_m + 0.5 $O2_m + 5 $H_m => NAD_m + $H2O_m + 10 $H; kETC*(NADH_m/(Km_NADH_m + NADH_m))*(O2_m/(Km_O2_m + O2_m)); vETC is "Electron Transport Chain (NADH)";
  vETC_FADH2: FADH2_m + 0.5 $O2_m + 5 $H_m => FAD_m + $H2O_m + 10 $H; kETC_FADH2*(FADH2_m/(Km_FADH2_m + FADH2_m))*(O2_m/(Km_O2_FADH2 + O2_m)); vETC_FADH2 is "Electron Transport Chain (FADH2)";
  vATPsyn: ADP_m + iP_m + 3 $H => ATP_m + $H2O_m + 3 $H_m; kATPsyn*(ADP_m/(Km_ADP_m + ADP_m))*(iP_m/(Km_iP_m + iP_m))*(H/(Km_H_m + H)); vATPsyn is "ATP Synthase";
  vPiH_symport: P + $H => iP_m + $H_m; kPiH*P;
    kPiH = 10 per_min;
  vANT: ATP_m + ADP -> ATP + ADP_m; kANT*(ATP_m*ADP - ATP*ADP_m); vANT is "Adenine Nucleotide Translocator";
  vROS: => ROS_m; leakFactor*kETC*(NADH_m/(Km_NADH_m + NADH_m))*(Km_O2_m/(Km_O2_m + O2_m)); vROS is "ROS Production";
    leakFactor = 0.01 dimensionless;
  vAntioxidants: ROS_m => ; ROS_clearance*ROS_m; vAntioxidants is "ROS Scavenging";
    ROS_clearance = 0.1 permin;
end
