// SBML level 2 version 5

model PPP()
  // Pentose Phosphate Pathway

  // Compartments:
  compartment cytosol = 1; cytosol is "Cytosol";

  // Species:
  species G6P in cytosol = 2.45; G6P is "Glucose 6 Phosphate";
  species NADP in cytosol = 0.1; NADP is "Nicotinamide Adenine Dinucleotide Phosphate (oxidized)";
  species NADPH in cytosol = 0.1; NADPH is "Nicotinamide Adenine Dinucleotide Phosphate (reduced)";
  species P6GL in cytosol = 0.1; P6GL is "6-Phosphogluconolactone";
  species $H in cytosol = 1; H is "Proton (cytosolic)";

  // Parameters:
  toggle_vG6PDH = 1 dimensionless;

  // Reactions:
  vG6PDH: G6P + NADP => P6GL + NADPH + $H; toggle_vG6PDH*VmG6PDH*(G6P/(KmG6PDH_G6P + G6P))*(NADP/(KmG6PDH_NADP + NADP)); vG6PDH is "Glucose-6-phosphate Dehydrogenase";
    VmG6PDH = 0.01 mM_per_min; KmG6PDH_G6P = 0.1 mM; KmG6PDH_NADP = 0.01 mM;

  // Unit definitions:
  unit mM = 1e-3 mole / litre;
  unit mM_per_min = 1e-3 mole / (litre * 60 second);
  unit per_min = 1 / (60 second);
end
