// SBML level 2 version 5

model TCA_Cycle()

  // Compartments:
  compartment extracellular = 1;
  compartment cytosol in extracellular = 1;
  compartment mitochondrion = 1; mitochondrion is "Mitochondrial Matrix";

  // Species:
  species NAD_m in mitochondrion = 1.2; NAD_m is "Nicotinamide Adenine Dinucleotide (oxidized)";
  species NADH_m in mitochondrion = 0.39; NADH_m is "Nicotinamide Adenine Dinucleotide (reduced)";
  species ATP_m in mitochondrion = 1.5; ATP_m is "Adenosine Triphosphate (mitochondrial)";
  species ADP_m in mitochondrion = 2.1; ADP_m is "Adenosine Diphosphate (mitochondrial)";
  species PYR in cytosol = 1.85; PYR is "Pyruvate";
  species PYR_m in mitochondrion = 0.1; PYR_m is "Pyruvate";
  species AcCoA_m in mitochondrion = 0.05; AcCoA_m is "Acetyl-CoA";
  species OAA_m in mitochondrion = 0.1; OAA_m is "Oxaloacetate";
  species Cit_m in mitochondrion = 0.5; Cit_m is "Citrate";
  species IsoCit_m in mitochondrion = 0.05; IsoCit_m is "Isocitrate";
  species aKG_m in mitochondrion = 0.1; aKG_m is "Alpha-Ketoglutarate";
  species SuccCoA_m in mitochondrion = 0.1; SuccCoA_m is "Succinyl-CoA";
  species Succ_m in mitochondrion = 0.1; Succ_m is "Succinate";
  species Fum_m in mitochondrion = 0.05; Fum_m is "Fumarate";
  species Mal_m in mitochondrion = 0.1; Mal_m is "Malate";
  species CoA_m in mitochondrion = 0.5; CoA_m is "Coenzyme A";
  species FAD_m in mitochondrion = 0.5; FAD_m is "Flavin Adenine Dinucleotide (oxidized)";
  species FADH2_m in mitochondrion = 0.05; FADH2_m is "Flavin Adenine Dinucleotide (reduced)";
  species $CO2_m in mitochondrion = 1; CO2_m is "Carbon Dioxide";
  species iP_m in mitochondrion = 5; iP_m is "Inorganic Phosphate";
  species $O2_m in mitochondrion = 1; O2_m is "Oxygen";
  species $H_m in mitochondrion = 1; H_m is "Proton";
  species $H in cytosol = 1; H is "Proton (cytosolic)";
  species $H2O_m in mitochondrion = 1; H2O_m is "Water";

  // Reactions:
  vPYR_trans: PYR -> PYR_m; kPYR_trans*(PYR - PYR_m); vPYR_trans is "Pyruvate Transport";
    kPYR_trans = 10 per_min;
  vPDH: PYR_m + CoA_m + NAD_m => AcCoA_m + $CO2_m + NADH_m; VmPDH*PYR_m*CoA_m*NAD_m/((KmPDH_PYR + PYR_m)*(KmPDH_CoA + CoA_m)*(KmPDH_NAD + NAD_m)); vPDH is "Pyruvate Dehydrogenase";
    VmPDH = 100 mM_per_min; KmPDH_PYR = 0.1 mM; KmPDH_CoA = 0.01 mM; KmPDH_NAD = 0.1 mM;
  vCS: AcCoA_m + OAA_m => Cit_m + CoA_m; VmCS*(AcCoA_m/(KmCS_AcCoA + AcCoA_m))*(OAA_m/(KmCS_OAA + OAA_m)); vCS is "Citrate Synthase";
    VmCS = 50 mM_per_min; KmCS_AcCoA = 0.01 mM; KmCS_OAA = 0.05 mM;
  vAcon: Cit_m -> IsoCit_m; kAcon_f*(Cit_m - IsoCit_m/KeqAcon); vAcon is "Aconitase";
    kAcon_f = 100 per_min; KeqAcon = 1 dimensionless;
  vIDH: IsoCit_m + NAD_m => aKG_m + $CO2_m + NADH_m; VmIDH*IsoCit_m*NAD_m/((KmIDH_IsoCit + IsoCit_m)*(KmIDH_NAD + NAD_m)); vIDH is "Isocitrate Dehydrogenase";
    VmIDH = 50 mM_per_min; KmIDH_IsoCit = 0.1 mM; KmIDH_NAD = 0.1 mM;
  vAKGDH: aKG_m + CoA_m + NAD_m => SuccCoA_m + $CO2_m + NADH_m; VmAKGDH/(1 + K_slowdown_AKGDH/aKG_m)*aKG_m*CoA_m*NAD_m; vAKGDH is "Alpha-Ketoglutarate Dehydrogenase";
    VmAKGDH = 50 mM_per_min; KmAKGDH_aKG = 0.1 mM; KmAKGDH_CoA = 0.01 mM; KmAKGDH_NAD = 0.1 mM; K_slowdown_AKGDH = 0.01 mM;
  vSCS: SuccCoA_m + ADP_m + iP_m => Succ_m + ATP_m + CoA_m; VmSCS*SuccCoA_m*ADP_m*iP_m/((KmSCS_SuccCoA + SuccCoA_m)*(KmSCS_ADP + ADP_m)*(KmSCS_iP + iP_m)); vSCS is "Succinyl-CoA Synthetase";
    VmSCS = 50 mM_per_min; KmSCS_SuccCoA = 0.01 mM; KmSCS_ADP = 0.1 mM; KmSCS_iP = 1 mM;
  vSDH: Succ_m + FAD_m => Fum_m + FADH2_m; VmSDH*Succ_m*FAD_m/((KmSDH_Succ + Succ_m)*(KmSDH_FAD + FAD_m)); vSDH is "Succinate Dehydrogenase";
    VmSDH = 50 mM_per_min; KmSDH_Succ = 0.5 mM; KmSDH_FAD = 0.01 mM;
  vFUM: Fum_m -> Mal_m; kFUM_f*(Fum_m - Mal_m/KeqFUM); vFUM is "Fumarase";
    kFUM_f = 100 per_min; KeqFUM = 4 dimensionless;
  vMDH: Mal_m + NAD_m -> OAA_m + NADH_m; kMDH_f*Mal_m*NAD_m - kMDH_r*OAA_m*NADH_m; vMDH is "Malate Dehydrogenase";
    kMDH_f = 100 mM_per_min; kMDH_r = 10 mM_per_min;
  vPC: PYR_m + $CO2_m + ATP_m => OAA_m + ADP_m + iP_m; VmPC*(PYR_m/(KmPC_PYR + PYR_m))*(ATP_m/(KmPC_ATP + ATP_m))*(CO2_m/(KmPC_CO2 + CO2_m)); vPC is "Pyruvate Carboxylase";
    VmPC = 5 mM_per_min; KmPC_PYR = 0.05 mM; KmPC_ATP = 0.05 mM; KmPC_CO2 = 0.01 mM;

  // Unit definitions:
  unit mM = 1e-3 mole / litre;
  unit mM_per_min = 1e-3 mole / (litre * 60 second);
  unit per_min = 1 / (60 second);
end
